x[0] := 0
v[0] := 1
a[0] := 1
x(t) := x[0] + v[0]*t + a[0]*t^2
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a1 := 3/7 - 26/30 = -0.438095
a2 := 26/210 = 0.12381
y(x) := a1*x + a2*x^2
y(7) = 3
y(0.5) = -0.188095
y(10) = 8
y1(x) := 3*(x - 10)/(7 - 10) + 8*(x - 7)/(10 - 7)
y1(7) = 3
y(0.5) = -0.188095
y1(10) = 8
