# Hexapod 3Gen
# Inverse kinematics for orientation | Решение для центральной правой лапы
# Точка назначения
# (координаты конца лапы)
# Константы (длины звеньев)
OA := 37
AB := 44
Destination := [50; 10; -50]
BC := 83
Destination := [81; 0; -50]
x := Destination[0] = 81
y := Destination[1] = 0
z := Destination[2] = -50
p := sqrt(x^2 + y^2) = 81
OC := sqrt(p^2 + z^2) = 95.1893
AC := sqrt((p - OA)^2 + z^2) = 66.6033
Qrad := atan(z/(p - OA)) = -0.849141
Q0rad := acos((AB^2 + AC^2 - BC^2)/(2*AB*AC)) = 1.65912
q0rad := atan(y/x) = 0
q1rad := Qrad + Q0rad = 0.809978
q2rad := acos((AB^2 + BC^2 - AC^2)/(2*AB*BC)) = 0.926165
q0real := q0rad*180/π = 0
q1real := q1rad*180/π = 46.4083
q2real := q2rad*180/π = 53.0654
q0 := q0real + 90 = 90
q1 := q1real + 90 = 136.408
q2 := q2real = 53.0654
Ap := OA
Bp := OA + AB*cos(q1rad) = 67.3386
Cp := p = 81
Ax := OA*cos(q0rad) = 37
Bx := Bp*cos(q0rad) = 67.3386
Cx := x = 81
Ay := OA*sin(q0rad) = 0
By := Bp*sin(q0rad) = 0
Cy := y = 0
Az := 0
Bz := AB*sin(q1rad) = 31.868
Cz := z = -50
CoordY := [0; Ay; By; Cy]
CoordX := [0; Ax; Bx; Cx]
CoordZ := [0; Az; Bz; Cz] = [0; 0; 31.868; -50]
CoordP := [0; Ap; Bp; Cp] = [0; 37; 67.3386; 81]
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DegToRad := π/180
dxc_offset := 129/2 = 64.5
dyc_offset := 0
a := 10
a_rad := a*DegToRad = 0.174533
R := [cos(a_rad), -sin(a_rad), 0; sin(a_rad), cos(a_rad), 0; 0, 0, 1]
P_old := [x; z; 1] = [81; -50; 1]
P_ls0 := [dxc_offset; dyc_offset; 1] = [64.5; 0; 1]
P_lsn := R*P_ls0 = [63.5201; 11.2003; 1]
# координаты конца лапы
# в лс до наклона
# координаты локальной системы
# центральной правой лапы до наклона
# координаты локальной системы
# центральной правой лапы после наклона
dx := P_lsn[0] - P_ls0[0] = -0.9799
dy := P_lsn[1] - P_ls0[1] = 11.2003
# смещение лс после наклона
M := [1, 0, -dx; 0, 1, -dy; 0, 0, 1]
M*P_old = [81.9799; -61.2003; 1]
Ri := [cos(a_rad), -sin(-a_rad), 0; sin(-a_rad), cos(a_rad), 0; 0, 0, 1]
# первое - P (x в вертикальной плоскости), второе - Z
P_new := R*M*P_old = [91.3618; -46.0349; 1]
145.6 - 134.76 = 10.84
81 - 10.84 = 70.16
-50 + 74.53 = 24.53
-50 - 24.53 = -74.53
CoordZ := [0; Az; Bz; Cz] = [0; 0; 31.868; -50]
CoordP := [0; Ap; Bp; Cp] = [0; 37; 67.3386; 81]
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P_old := [x; z; 1] = [81; -50; 1]
P_base := P_old + [64.5; 0; 0] = [145.5; -50; 1]
# координаты конца лапы
# в лск до наклона
# координаты конца лапы в ск
# относительно центра вращения
a := -10
a_rad := a*DegToRad = -0.174533
R := [cos(a_rad), -sin(a_rad), 0; sin(a_rad), cos(a_rad), 0; 0, 0, 1]
P_base_new := R*P_base = [134.607; -74.5062; 1]
P_delta := P_base_new - P_base = [-10.8929; -24.5062; 0]
P_new := P_old + P_delta = [70.1071; -74.5062; 1]
CoordZ := [0; Az; Bz; Cz] = [0; 0; 31.868; -50]
CoordP := [0; Ap; Bp; Cp] = [0; 37; 67.3386; 81]
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