# Последовательность переходов
rad := π/180
# Первый
roll_grad := 20
pitch_grad := 25
roll := roll_grad*rad = 0.349066
pitch := -pitch_grad*rad = -0.436332
yaw := 0
R_roll := [cos(roll), 0, sin(roll); 0, 1, 0; -sin(roll), 0, cos(roll)]
R_pitch := [1, 0, 0; 0, cos(pitch), -sin(pitch); 0, sin(pitch), cos(pitch)]
R_yaw := [cos(yaw), -sin(yaw), 0; sin(yaw), cos(yaw), 0; 0, 0, 1]
R := R_roll*R_pitch*R_yaw = [0.939693, -0.144544, 0.309976; 0, 0.906308, 0.422618; -0.34202, -0.397131, 0.851651]
P[0] := [0; 0; 10]
i := 0
L[i] := sqrt(P[i][0]^2 + P[i][1]^2 + P[i][2]^2)
P[1] := R*P[0] = [3.09976; 4.22618; 8.51651]
L[i] = 10
# Второй
40
roll_grad := 33
50
pitch_grad := 18
roll := roll_grad*rad = 0.575959
pitch := -pitch_grad*rad = -0.314159
R_roll := [cos(roll), 0, sin(roll); 0, 1, 0; -sin(roll), 0, cos(roll)]
R_pitch := [1, 0, 0; 0, cos(pitch), -sin(pitch); 0, sin(pitch), cos(pitch)]
R_yaw := [cos(yaw), -sin(yaw), 0; sin(yaw), cos(yaw), 0; 0, 0, 1]
R := R_roll*R_pitch*R_yaw = [0.838671, -0.168303, 0.517983; 0, 0.951057, 0.309017; -0.544639, -0.259163, 0.797623]
P[1] = [3.09976; 4.22618; 8.51651]
i := 1
P[2] := R*P[1] = [6.2998; 6.65108; 4.00944]
L[i] := sqrt(P[i][0]^2 + P[i][1]^2 + P[i][2]^2)
# Третий
L[i] = 10
roll_grad := -20 = -20
pitch_grad := -25 = -25
roll := roll_grad*rad = -0.349066
pitch := -pitch_grad*rad = 0.436332
R_roll := [cos(roll), 0, sin(roll); 0, 1, 0; -sin(roll), 0, cos(roll)]
R_pitch := [1, 0, 0; 0, cos(pitch), -sin(pitch); 0, sin(pitch), cos(pitch)]
R_yaw := [cos(yaw), -sin(yaw), 0; sin(yaw), cos(yaw), 0; 0, 0, 1]
R := R_roll*R_pitch*R_yaw = [0.939693, -0.144544, -0.309976; 0, 0.906308, -0.422618; 0.34202, 0.397131, 0.851651]
P[2] = [6.2998; 6.65108; 4.00944]
P[3] := R*P[2] = [3.71567; 4.33347; 8.21066]
# Четвертый
roll_grad := -20 = -20
pitch_grad := -25 = -25
roll := roll_grad*rad = -0.349066
pitch := -pitch_grad*rad = 0.436332
R_roll := [cos(roll), 0, sin(roll); 0, 1, 0; -sin(roll), 0, cos(roll)]
R_pitch := [1, 0, 0; 0, cos(pitch), -sin(pitch); 0, sin(pitch), cos(pitch)]
R_yaw := [cos(yaw), -sin(yaw), 0; sin(yaw), cos(yaw), 0; 0, 0, 1]
R := R_roll*R_pitch*R_yaw = [0.939693, -0.144544, -0.309976; 0, 0.906308, -0.422618; 0.34202, 0.397131, 0.851651]
P[3] = [3.71567; 4.33347; 8.21066]
P[4] := R*P[3] = [0.320109; 0.45748; 9.9844]
roll_grad := 40
pitch_grad := 50
roll := roll_grad*rad = 0.698132
pitch := -pitch_grad*rad = -0.872665
yaw := 0
R_roll := [cos(roll), 0, sin(roll); 0, 1, 0; -sin(roll), 0, cos(roll)]
R_pitch := [1, 0, 0; 0, cos(pitch), -sin(pitch); 0, sin(pitch), cos(pitch)]
R_yaw := [cos(yaw), -sin(yaw), 0; sin(yaw), cos(yaw), 0; 0, 0, 1]
R := R_roll*R_pitch*R_yaw = [0.766044, -0.492404, 0.413176; 0, 0.642788, 0.766044; -0.642788, -0.586824, 0.492404]
P[0] := [0; 0; 10]
P[1] := R*P[0] = [4.13176; 7.66044; 4.92404]
