x := 0
roll_grad := 30
q_grad := 30
y := 0
rad := π/180
pitch_grad := 45
z := 10
q := -q_grad*rad = -0.523599
roll := roll_grad*rad = 0.523599
pitch := -pitch_grad*rad = -0.785398
R := [cos(q), -sin(q); sin(q), cos(q)]
Rroll := [cos(q), sin(q); -sin(q), cos(q)]
P_old := [x; y; z] = [0; 0; 10]
R_roll := [cos(roll), sin(roll); -sin(roll), cos(roll)]
R_pitch := [cos(pitch), -sin(pitch); sin(pitch), cos(pitch)]
# вокруг y (roll)
P := R*[z; x] = [8.66025; -5]
P := Rroll*[x; z] = [-5; 8.66025]
# в плоскости XZ (roll)
# вокруг x (pitch)
P := R*[y; z] = [5; 8.66025]
P_old_yz := [y; z] = [0; 10]
# вокруг Z (yaw)
P := R*[x; y] = [0; 0]
P_old_xz := [x; z] = [0; 10]
P_new_yz := R_pitch*P_old_yz = [7.07107; 7.07107]
P_new_xz := R_roll*P_old_xz = [5; 8.66025]
P_old_xz := [x; P_new_yz[1]] = [0; 7.07107]
P_new_xz := R_roll*P_old_xz = [3.53553; 6.12372]
roll_grad := -30
P_new := [P_new_xz[0]; P_new_yz[0]; P_new_xz[1]] = [3.53553; 7.07107; 6.12372]
pitch_grad := -45
roll := roll_grad*rad = -0.523599
pitch := -pitch_grad*rad = 0.785398
R_roll := [cos(roll), sin(roll); -sin(roll), cos(roll)]
R_pitch := [cos(pitch), -sin(pitch); sin(pitch), cos(pitch)]
x := P_new[0] = 3.53553
y := P_new[1] = 7.07107
z := P_new[2] = 6.12372
P_old_yz := [y; z] = [7.07107; 6.12372]
P_new_yz := R_pitch*P_old_yz = [0.669873; 9.33013]
P_old_xz := [x; P_new_yz[1]] = [3.53553; 9.33013]
P_new_xz := R_roll*P_old_xz = [-1.6032; 9.84789]
P_new := [P_new_xz[0]; P_new_yz[0]; P_new_xz[1]] = [-1.6032; 0.669873; 9.84789]
P_old_xz := [x; z] = [3.53553; 6.12372]
P_new_xz := R_roll*P_old_xz = [0; 7.07107]
P_old_yz := [y; P_new_xz[1]] = [7.07107; 7.07107]
P_new_yz := R_pitch*P_old_yz = [0; 10]
P_new := [P_new_xz[0]; P_new_yz[0]; P_new_yz[1]] = [0; 0; 10]
x := 0
roll_grad := 30
y := 0
pitch_grad := 45
z := 10
roll := roll_grad*rad = 0.523599
pitch := -pitch_grad*rad = -0.785398
yaw := 0
R := [
    cos(roll)*cos(pitch), sin(roll)*sin(0) - cos(roll)*sin(pitch)*cos(0), cos(roll)*sin(pitch)*sin(0) + sin(roll)*cos(0);
    sin(pitch), cos(pitch)*cos(0), -cos(pitch)*sin(0);
    -sin(roll)*cos(roll), sin(roll)*sin(pitch)*cos(0) + cos(roll)*sin(0), cos(roll)*cos(0) - sin(roll)*sin(pitch)*sin(0)
] = [0.612372, 0.612372, 0.5; -0.707107, 0.707107, 0; -0.433013, -0.353553, 0.866025]
R_roll := [cos(roll), 0, sin(roll); 0, 1, 0; -sin(roll), 0, cos(roll)]
R_pitch := [1, 0, 0; 0, cos(pitch), -sin(pitch); 0, sin(pitch), cos(pitch)]
R_yaw := [cos(yaw), -sin(yaw), 0; sin(yaw), cos(yaw), 0; 0, 0, 1]
R := R_roll*R_pitch*R_yaw = [0.866025, -0.353553, 0.353553; 0, 0.707107, 0.707107; -0.5, -0.612372, 0.612372]
P_old := [x; y; z] = [0; 0; 10]
P_new := R*P_old = [3.53553; 7.07107; 6.12372]
P := R_roll*P_old = [5; 0; 8.66025]
P := R_pitch*P_old = [0; 7.07107; 7.07107]
