x(t) := t + t^2
y(t) := t^2 + 6*t^6
sn(t) := sqrt(x(t)^2 + y(t)^2)
dsn(t) := d/dt(sn(t))
vsn(t) := sqrt((d/dt(x(t)))^2 + (d/dt(y(t)))^2)
d/dt(x(t)) → 2*t + 1
d/dt(y(t)) → 36*t^5 + 2*t
sn(5) = 93775
d/dt(sn(t)) → (2*(t^2 + t)*(2*t + 1) + 2*(36*t^5 + 2*t)*(6*t^6 + t^2))/(2*sqrt((6*t^6 + t^2)^2 + (t^2 + t)^2))
dsn(5) = 112510
vsn(5) = 112510
