h := 1
x1 := 0
x2 := 2
x3 := x1 + (x2 - x1)/2
y1 := 0
y2 := 0
y3 := h
a := h/(x1 - x3)^2
y(x) := -a*(x - x3)^2 + y3
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T := 10
x(t) := x1 + (x2 - x1)*t/T
y(t) := -a*(x1 + (x2 - x1)*t/T - x3)^2 + y3
Vx(t) := d/dt(x(t)) → 1/5
Vy(t) := d/dt(y(t)) → 2/5 - 2*t/25
Given
d/dt(y(t)) + 6*y(t) == 0
y(0) == 1
y := Odesolve(t, 50)
