r := 2
w := 1
x(t) := r*cos(w*t)
y(t) := r*sin(w*t)
q(t) := w*t
q(10) = 10
Vx(t) := -w*r*sin(w*t)
Vy(t) := w*r*cos(w*t)
Ax(t) := -w^2*r*cos(w*t)
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Ay(t) := -w^2*r*sin(w*t)
V(t) := sqrt(Vx(t)^2 + Vy(t)^2)
At(t) := sqrt(Ax(t)^2 + Ay(t)^2)
L(t) := 2*π*r*q(t)/360
x(10) = -1.67814
V(10) = 2
L(10) = 0.349066
y(10) = -1.08804
At(10) = 2
V1 := 3
A1 := 15
R := 6
w := 0.5
b := 2.5
L1(t) := V1*t + A1*t^2/2
dL1(t) := V1 + A1*t
α(t) := L1(t)/R
x(t) := R*cos(w*t + b*t^2/2)
q(t) := w*t + b*t^2/2
dL1(10) = 153
x1(t) := R*cos(α(t))
y(t) := R*sin(w*t + b*t^2/2)
L2(t) := q(t)*R
y1(t) := R*sin(α(t))
dx1(t) := d/dt(x1(t))
Vx(t) := -R*sin(w*t + b*t^2/2)*(w + b*t)
dy1(t) := d/dt(y1(t))
Vy(t) := R*cos(w*t + b*t^2/2)*(w + b*t)
T(t)
dV(t) := sqrt(dx1(t)^2 + dy1(t)^2)
V(t) := sqrt(Vx(t)^2 + Vy(t)^2)
x1(10) = -2.20375
y1(10) = -5.58064
x(10) = -2.20375
y(10) = -5.58064
α(10) = 130
L1(10) = 780
q(10) = 130
L2(10) = 780
dV(10) = 153
V(10) = 153
dx1(10) = 142.306
Vx(10) = 142.306
dy1(10) = -56.1956
Vy(10) = -56.1956
b1 := 180*A1/(3*π*R) = 47.7465
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t1 := 2
w1 := 180*V1/(π*R) + 180*A1*t1/(π*R) - 3*b1*t1 = 28.6479
w2 := V1/R = 0.5
b2 := A1/R = 2.5
x(t) := sin(t)
T(t) := t - t^3/6
T1(t) := t - t^3/6 + t^5/120
T2(t) := t - t^3/6 + t^5/120 - t^7/7!
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t := 0 .. 10
T(t) = [0; 0.833333; 0.666667; -1.5; -6.66667; -15.8333; -30; -50.1667; -77.3333; -112.5; -156.667]
T1(t) = [0; 0.841667; 0.933333; 0.525; 1.86667; 10.2083; 34.8; 89.8917; 195.733; 379.575; 676.667]
T2(t) = [0; 0.841468; 0.907937; 0.0910714; -1.38413; -5.29266; -20.7429; -73.5097; -220.368; -569.427; -1307.46]
x(t) = [0; 0.841471; 0.909297; 0.14112; -0.756802; -0.958924; -0.279415; 0.656987; 0.989358; 0.412118; -0.544021]
dT2(t) := d/dt(T2(t)) → t^4/24 - t^6/720 - t^2/2 + 1
x(t) := dT2(t)*t
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dT1(t) := d/dt(T1(t)) → t^4/24 - t^2/2 + 1
T11(t) := integral(dT1(t), t) → t^5/120 - t^3/6 + t
T11(t) = [0; 0.841667; 0.933333; 0.525; 1.86667; 10.2083; 34.8; 89.8917; 195.733; 379.575; 676.667]
v := 2
a := 1
x(t) := v*t + a*t^2/2
dx(t) := d/dt(x(t)) → t + 2
ddx(t) := d/dt(dx(t)) → 1
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x(1) = 2.5
dx(1) = 3
x1(1) = -1.06948
t := 0 .. 10
x(t) = [0; 2.5; 6; 10.5; 16; 22.5; 30; 38.5; 48; 58.5; 70]
Y(X) := X
Vt := 3
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X := 1
k := Y(X)/X = 1
Vx := sqrt(Vt^2/(1 + k^2)) = 2.12132
Vy := sqrt(Vt^2/(1 + 1/k^2)) = 2.12132
x(t) := Vx*t
y(t) := Vy*t
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x(t) := Vx*t
y(t) := Vy*t
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